// SBML level 2 version 4

model tolic_2000____main()
  // Originally created by libAntimony v1.4 (using libSBML 4.1.0-b2)

  // Compartments:
  compartment default_compartment = 1;

  // Parameters:
  Vp = 3;
  Vi = 11;
  Vg = 10;
  E = 0.2;
  Ip = 93.36442;
  plasma_insulin_tp = 6;
  plasma_insulin_Rm = 210;
  plasma_insulin_C1 = 2000;
  plasma_insulin_a1 = 300;
  Ii = 243.2865;
  G = 12342.62;
  ti = 100;
  glucose_Gin = 216;
  glucose_C2 = 144;
  glucose_C3 = 1000;
  glucose_C4 = 80;
  glucose_C5 = 26;
  glucose_U0 = 40;
  glucose_Um = 940;
  glucose_Ub = 72;
  glucose_beta = 1.77;
  glucose_Rg = 180;
  glucose_alpha = 0.29;
  x3 = 104.5879;
  delay__td = 36;
  delay__x1 = 110.420253;
  delay__x2 = 112.7601;
  time_ = ;

  // Assignment rules:
  plasma_insulin_Ip_conc := Ip/Vp;
  plasma_insulin_f1_G := plasma_insulin_Rm/(1 + exp((plasma_insulin_C1 - G/Vg)/plasma_insulin_a1));
  intercellular_insulin_Ii_conc := Ii/Vi;
  glucose_G_conc := G/(Vg*10);
  glucose_f2_G := glucose_Ub*(1 - exp(-G/(glucose_C2*Vg)));
  glucose_f3_G := G/(glucose_C3*Vg);
  glucose_f4_Ii := glucose_U0 + (glucose_Um - glucose_U0)/(1 + exp(-glucose_beta*ln(Ii/glucose_C4*(1/Vi + 1/(E*ti)))));
  glucose_f5_x3 := glucose_Rg/(1 + exp(glucose_alpha*(x3*1/Vp - glucose_C5)));

  // Rate rules:
  Ip' = plasma_insulin_f1_G - (E*(Ip/Vp - Ii/Vi) + Ip/plasma_insulin_tp);
  Ii' = E*(Ip/Vp - Ii/Vi) - Ii/ti;
  G' = glucose_Gin + glucose_f5_x3 + (-(glucose_f2_G + glucose_f3_G*glucose_f4_Ii));
  x3' = 3/delay__td*(delay__x2 - x3);
  delay__x1' = 3/delay__td*(Ip/1 - delay__x1);
  delay__x2' = 3/delay__td*(delay__x1 - delay__x2);
end
